Simulations: Version=67
  Simulation
    Clock: Start=1980-01-01; End=2014-12-31
    Summary SummaryFile
    Weather: FileName=Iowa C.met
    SoilArbitrator Soil Arbitrator
    Zone Field: Area=1; Slope=0
      Report: EventNames=[Clock].EndOfDay
        VariableNames:
          [Clock].Today
          [Weather].Rain
          [Weather].Radn
          [Weather].MaxT
          [Weather].MeanT
          [Weather].MinT
          [Weather].VPD
          [Maize].Phenology.CurrentStageName
          [Maize].AboveGround.Wt
          [Maize].Grain.Wt
          [Maize].Grain.Size
          [Maize].Leaf.Transpiration
          [MicroClimate].RadiationInterception
          [MicroClimate].PetTotal
          [Soil].SoilWater.Runoff
          [Soil].SoilWater.Drainage
          sum([Soil].SoilWater.ESW)
          [SoilWater].LeachNO3
      Fertiliser
      MicroClimate: a_interception=0; b_interception=0; c_interception=0; d_interception=0; soil_albedo=0; SoilHeatFluxFraction=0; NightInterceptionFraction=0; ReferenceHeight=0
      Manager SowingFertiliser
        Amount = 150
        CropName = maize
```csharp
using System;
using Models.Core;
using Models.PMF;
namespace Models
{
    [Serializable]
    public class Script : Model
    {
        [Link] Clock Clock;
        [Link] Fertiliser Fertiliser;
        [Link] Summary Summary;
        
        
        [Description("Amount of fertiliser to be applied (kg/ha)")]
        public double Amount { get; set; }
        
        [Description("Crop to be fertilised")]
        public string CropName { get; set; }
        
        
        

        [EventSubscribe("Sowing")]
        private void OnSowing(object sender, EventArgs e)
        {
            Model crop = sender as Model;
            if (crop.Name.ToLower() == CropName.ToLower())
                Fertiliser.Apply(Amount: Amount, Type: Fertiliser.Types.UreaN);
        }
        
    }
}
```
      Manager SowingRule
        StartDate = 5-may
        EndDate = 5-may
        MinESW = -1
        MinRain = -1
        RainDays = 7
        CultivarName = GH_5019WX
        SowingDepth = 50
        RowSpacing = 760
        Population = 8
```csharp
using System;
using Models.Core;
using Models.PMF;
using Models.Soils;
using Models.Soils.Nutrients;
using Models.Utilities;
using APSIM.Shared.Utilities;

namespace Models
{
    [Serializable]
    public class Script : Model
    {
        [Link] Clock Clock;
        [Link] Fertiliser Fertiliser;
        [Link] Summary Summary;
        [Link] Plant Maize;
        [Link] Soil Soil;
        Accumulator accumulatedRain;
        
        [Description("Start of sowing window (d-mmm)")]
        public string StartDate { get; set; }
        [Description("End of sowing window (d-mmm)")]
        public string EndDate { get; set; }
        [Description("Minimum extractable soil water for sowing (mm)")]
        public double MinESW { get; set; }
        [Description("Accumulated rainfall required for sowing (mm)")]
        public double MinRain { get; set; }
        [Description("Duration of rainfall accumulation (d)")]
        public int RainDays { get; set; }
        [Description("Cultivar to be sown")]
        [Display(Type=DisplayType.CultivarName)]
        public string CultivarName { get; set; }
        [Description("Sowing depth (mm)")]
        public double SowingDepth { get; set; }
        [Description("Row spacing (mm)")]
        public double RowSpacing { get; set; }
        [Description("Plant population (/m2)")]
        public double Population { get; set; }
        
        
        [EventSubscribe("Commencing")]
        private void OnSimulationCommencing(object sender, EventArgs e)
        {
            accumulatedRain = new Accumulator(this, "[Weather].Rain", RainDays);
        }
        

        [EventSubscribe("DoManagement")]
        private void OnDoManagement(object sender, EventArgs e)
        {
            accumulatedRain.Update();
            
            if (DateUtilities.WithinDates(StartDate, Clock.Today, EndDate) &&
                !Maize.IsAlive &&
                MathUtilities.Sum(Soil.SoilWater.ESW) > MinESW &&
                accumulatedRain.Sum > MinRain)
            {
                Maize.Sow(population: Population, cultivar: CultivarName, depth: SowingDepth, rowSpacing: RowSpacing);    
            }
        
        }
        
    }
}
```
      Manager Harvesting
```csharp
using System;
using Models.Core;
using System.Collections.Generic;
using System.Text;
using Models.Soils;
using Models.Soils.Nutrients;
using Models.PMF;
using Models;
using System.Xml.Serialization;
using APSIM.Shared.Utilities;

namespace Models
{
    [Serializable] 
    public class Script : Model
    {
        [Link] Plant Maize;
        [Link] Zone zone;
                    
        
        [EventSubscribe("Commencing")]
        private void OnSimulationCommencing(object sender, EventArgs e)
        {
        }
        
        [EventSubscribe("DoManagement")]
        private void OnDoManagement(object sender, EventArgs e)
        {
            if (Maize.Phenology.CurrentPhaseName == "ReadyForHarvesting")
            {
                Maize.Harvest();
                Maize.EndCrop();
            }
        }
        
        [EventSubscribe("DoManagementCalculations")]
        private void OnDoManagementCalculations(object sender, EventArgs e)
        {
            
        }
    }
}
```
      Soil Loam (Nicollet, No1): SoilType=Nicollet; Region=Story; State=Iowa; Country=US; ApsoilNumber=1; Latitude=42.049; Longitude=-93.4345
        DataSource:
          Original data by http://websoilsurvey.sc.egov.usda.gov/App/HomePage.htm
          Profile developed by Integrated Cropping Systems Lab, Department of Agronomy, ISU
        Comments:
          The Nicollet series consists of very deep, somewhat poorly drained soils that formed in calcareous loamy glacial till on till plains and moraines. Slopes range from 0 to 5 percent. Mean annual air temperature is about 9 degrees C (48 degrees F). Mean annual precipitation is about 660 mm (28 inches).
          TAXONOMIC CLASS: Fine-loamy, mixed, superactive, mesic Aquic Hapludolls
          TYPICAL PEDON: Nicollet clay loam on a 2 percent plane slope in a cultivated field. (Colors are for moist soil unless otherwise stated.)
          Ap--0 to 25 cm (0 to 10 inches); black (10YR 2/1) clay loam; weak fine subangular blocky structure; friable; about 2 percent gravel; slightly acid; abrupt smooth boundary. [18 to 28 cm (7 to 12 inches thick)]
          A--25 to 43 cm (10 to 17 inches); very dark gray (10YR 3/1) clay loam; moderate fine subangular blocky structure; friable; about 5 percent gravel; common black (10YR 2/1) worm casts; slightly acid; gradual irregular boundary. [8 to 38 cm (3 to 15 inches thick)]
          Bw--43 to 53 cm (17 to 21 inches); dark grayish brown (10YR 4/2) clay loam; moderate fine subangular blocky structure; friable; common very dark gray (10YR 3/1) worm casts; about 5 percent gravel; moderately acid; clear smooth boundary.
          Bg1--53 to 74 cm (21 to 29 inches); dark grayish brown (2.5Y 4/2) clay loam; moderate fine prismatic structure parting to moderate fine subangular blocky; friable; few very dark gray (10YR 3/1) worm casts; about 5 percent gravel; common fine distinct olive brown (2.5Y 4/4) Fe concentrations; moderately acid; abrupt wavy boundary.
          Bg2--74 to 84 cm (29 to 33 inches); dark grayish brown (2.5Y 4/2) clay loam; weak medium prismatic structure parting to moderate fine and medium subangular blocky; friable; few very dark gray (10YR 3/1) worm casts; about 5 percent gravel; few fine faint grayish brown (2.5Y 5/2) Fe depletions and a few fine distinct light olive brown (2.5Y 5/4) and prominent brown (7.5YR 5/4) Fe concentrations; slightly acid; abrupt wavy boundary. [Combined thickness of the B horizon is 15 to 51 cm (6 to 20 inches.)
          BCg--84 to 91 cm (33 to 36 inches); grayish brown (2.5Y 5/2) clay loam; weak fine and medium subangular blocky structure; friable; few very dark gray (10YR 3/1) worm casts; about 5 percent gravel; many fine distinct light olive brown (2.5Y 5/4) Fe concentrations; slightly effervescent in parts; slightly alkaline; abrupt wavy boundary.[0 to 20 cm (0 to 8 inches thick) ]
          BCkg--91 to 152 cm (36 to 60 inches); grayish brown (2.5Y 5/2) loam; massive in place breaking to angular fragments with greater horizontal than vertical dimensions; friable; about 5 percent gravel; common lime masses; many fine distinct light olive brown (2.5Y 5/4) and few fine prominent yellowish brown (10YR 5/8) Fe concentrations; few black (N 2/0) Fe-Mn concretions; strongly effervescent; slightly alkaline.
        Physical
          Thickness  ParticleSizeClay  BD    AirDry  LL15   DUL    SAT
          220        26                1.2   0.1431  0.159  0.305  0.49717
          220        26                1.2   0.159   0.159  0.305  0.49717
          240        29                1.3   0.159   0.159  0.292  0.459434
          240        29                1.3   0.159   0.159  0.292  0.459434
          310        27                1.45  0.159   0.159  0.289  0.40283
          310        27                1.45  0.159   0.159  0.289  0.40283
          SoilCrop MaizeSoil
            LL=[0.159, 0.159, 0.159, 0.159, 0.159, 0.159]
            KL=[0.08, 0.0718126, 0.0612405, 0.0517699, 0.0427795, 0.0345552]
            XF=[1, 1, 1, 1, 1, 1]
            LL source: Estimated based on local knowledge
          SoilCrop SoybeanSoil: same as Simulation.Field.Loam (Nicollet, No1).Physical.MaizeSoil
        SoilWater: SummerDate=1-jun; SummerU=8.8; SummerCona=3.9; WinterDate=1-nov; WinterU=8.8; WinterCona=3.9; DiffusConst=40; DiffusSlope=16; Salb=0.13; CN2Bare=73; CNRed=20; CNCov=0.8; max_pond=0; Thickness=[220, 220, 240, 240, 310, 310]
          SWCON=[0.442586, 0.442586, 0.426815, 0.426815, 0.361792, 0.361792]
        SoilNitrogen: fom_types=[default, manure, mucuna, lablab, shemp, stable]; fract_carb=[0.2, 0.3, 0.54, 0.57, 0.45, 0]; fract_cell=[0.7, 0.3, 0.37, 0.37, 0.47, 0.1]; fract_lign=[0.1, 0.4, 0.09, 0.06, 0.08, 0.9]
          SoilNitrogenNO3 NO3
          SoilNitrogenNH4 NH4
          SoilNitrogenUrea Urea
          SoilNitrogenPlantAvailableNO3 PlantAvailableNO3
          SoilNitrogenPlantAvailableNH4 PlantAvailableNH4
        Organic: FOMCNRatio=45
          Thickness  Carbon    SoilCNRatio  FBiom     FInert  FOM
          220        3.19767   13           0.038875  0.406   395.014
          220        3.19767   13           0.01515   0.578   257.328
          240        0.436047  13           0.0106    0.76    161.228
          240        0.436047  13           0.01      0.8     101.017
          310        0.145349  13           0.01      0.8     55.2236
          310        0.145349  13           0.01      0.8576  30.1895
        Chemical
          Thickness  NO3N      NH4N      PH
          220        3.78788   1.89394   5.532
          220        2.65152   1.51515   5.532
          240        1.60256   0.961538  5.532
          240        1.28205   0.641026  5.532
          310        0.444939  0.222469  6.804
          310        0.222469  0         6.804
        InitialWater: PercentMethod=0; FractionFull=1
        Sample InitialNitrogen: Thickness=[220, 220, 240, 240, 310, 310]; SWUnits=Volumetric; OCUnits=Total; PHUnits=Water
        CERESSoilTemperature
      SurfaceOrganicMatter: InitialResidueName=soybean; InitialResidueType=soybean; InitialResidueMass=1250; InitialStandingFraction=0; InitialCPR=0; InitialCNR=27; FractionFaecesAdded=0.5
      Plant Maize: CropType=Maize; IsEnding=false; DaysAfterEnding=0
  DataStore
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